OpenVSP model (file version 5), 84 components.
Geometry view with OpenVSP parameter names; values to 6 digits, angles in degrees, lengths in the model's unit.
Overall bounding box: X_Min=0 X_Len=50.001 Y_Min=-21.1514 Y_Len=42.3027 Z_Min=-5.75 Z_Len=13.3073

Fuselage "Main Fuselage"
  location (X Y Z) 0 0 0, rotation 0 0 0
  bounding box size 45.5 11.7673 5.62624
  Design: Length=45.5
  cross sections:
    n  XLocPercent  YLocPercent  ZLocPercent  shape
    0  0            0            0            point
    1  0.116983     0            0            biconvex Chord=3.2765 ThickChord=1
    2  0.275586     0            0            edit curve Width=5.46 Height=5.46 AbsoluteFlag=0 SymType=1 cubic Bezier points (X Y): 0.437113 0, 0.437113 -0.0651936, 0.127784 -0.395642, 0 -0.445312, -0.127784 -0.395642, -0.437113 -0.0651936, -0.437113 0, -0.407609 0.0265832, -0.269531 0.121094, -0.222656 0.222656, -0.15625 0.359375, -0.154713 0.417222, 0 0.515625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
    3  0.386151     0            0            edit curve Width=5.42427 Height=5.68673 AbsoluteFlag=0 SymType=1 cubic Bezier points (X Y): 0.596715 -0.00273723, 0.370718 -0.120093, 0.21124 -0.328255, 0 -0.460937, -0.21124 -0.328255, -0.370718 -0.120093, -0.596715 -0.00273723, -0.533759 0.0350365, -0.430003 0.0585938, -0.31124 0.257813, -0.18624 0.386719, -0.161496 0.465328, 0 0.514599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
    4  0.487467     0            0            edit curve Width=8.66763 Height=5.46 AbsoluteFlag=0 SymType=1 cubic Bezier points (X Y): 0.635206 0, 0.635206 -0.0527046, 0.329849 -0.132465, 0.294265 -0.193299, 0.223097 -0.206335, 0.251825 -0.473636, 0 -0.481615, -0.251825 -0.473636, -0.223097 -0.206335, -0.294265 -0.193299, -0.329849 -0.132465, -0.635206 -0.0527046, -0.635206 0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
    5  0.513307     0            0            edit curve Width=8.45758 Height=5.46 AbsoluteFlag=0 SymType=1 cubic Bezier points (X Y): 0.695666 0, 0.695666 -0.0527046, 0.541971 -0.356313, 0.506387 -0.417147, 0.435219 -0.430183, 0.251825 -0.473636, 0 -0.481615, -0.251825 -0.473636, -0.435219 -0.430183, -0.506387 -0.417147, -0.541971 -0.356313, -0.695666 -0.0527046, -0.695666 0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
    6  0.92054      0            0            edit curve Width=8.1528 Height=5.46 AbsoluteFlag=0 SymType=1 cubic Bezier points (X Y): 0.695666 0, 0.695666 -0.0527046, 0.541971 -0.356313, 0.506387 -0.417147, 0.435219 -0.430183, 0.251825 -0.473636, 0 -0.481615, -0.251825 -0.473636, -0.435219 -0.430183, -0.506387 -0.417147, -0.541971 -0.356313, -0.695666 -0.0527046, -0.695666 0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
    7  1            0            0            circle Circle_Diameter=3.83

Fuselage "Rear Struts", child of "Main Fuselage"
  location (X Y Z) 36 5.04082 -4.90574, rotation -180 -75 175; relative location 36 5.04082 -4.90574, rotation 0 -105 -5
  symmetric about XZ
  bounding box size 1.83716 10.8288 4.34682
  Design: Length=4.25
  cross sections:
    n  XLocPercent  YLocPercent  ZLocPercent  shape
    0  0            0            0            circle Circle_Diameter=0.75
    1  0.5          0            0            as above
    2  1            0            0            as above

Fuselage "Rear Wheels", child of "Rear Struts"
  location (X Y Z) 36 5.5 -4.5, rotation 0 0 90
  symmetric about XZ
  bounding box size 2.5 13 2.5
  Design: Length=1
  cross sections:
    n  XLocPercent  YLocPercent  ZLocPercent  shape
    0  0            0            0            circle Circle_Diameter=2.5
    1  0.5          0            0            as above
    2  1            0            0            as above

Fuselage "Rear Axles", child of "Rear Struts"
  location (X Y Z) 36 -6 -4.5, rotation -180 -75 -90; relative location 36 -6 -4.5, rotation 0 -105 90
  symmetric about XZ
  bounding box size 1.22474 12 1.22474
  Design: Length=1
  cross sections:
    n  XLocPercent  YLocPercent  ZLocPercent  shape
    0  0            0            0            circle Circle_Diameter=1
    1  0.5          0            0            as above
    2  1            0            0            as above

Fuselage "Front Strut", child of "Main Fuselage"
  location (X Y Z) 15 0 -0.75, rotation 0 90 0
  bounding box size 0.5 0.5 4.25
  Design: Length=4.25
  cross sections:
    n  XLocPercent  YLocPercent  ZLocPercent  shape
    0  0            0            0            circle Circle_Diameter=0.5
    1  0.5          0            0            as above
    2  1            0            0            as above

Fuselage "Front Wheels", child of "Front Strut"
  location (X Y Z) 15 0.5 -4.75, rotation 0 0 90
  symmetric about XZ
  bounding box size 2 2.5 2
  Design: Length=0.75
  cross sections:
    n  XLocPercent  YLocPercent  ZLocPercent  shape
    0  0            0            0            circle Circle_Diameter=2
    1  0.5          0            0            as above
    2  1            0            0            as above

Fuselage "Front Axle", child of "Front Strut"
  location (X Y Z) 15 -1 -4.75, rotation -180 -75 -90
  bounding box size 0.918559 2 0.918559
  Design: Length=2
  cross sections:
    n  XLocPercent  YLocPercent  ZLocPercent  shape
    0  0            0            0            circle Circle_Diameter=0.75
    1  0.5          0            0            as above
    2  1            0            0            as above

Fuselage "Cockpit", child of "Main Fuselage"
  location (X Y Z) 7.7756 0 2.14489, rotation 0 -3.90476 0
  bounding box size 10.9619 2.55755 3.81528
  Design: Length=10.7766
  cross sections:
    n  XLocPercent  YLocPercent  ZLocPercent  shape
    0  0            0            0            point
    1  0.42381      0            -0.00952381  general fuselage BotStr=1.83 BotTanAngle=90 CornerRad=0 Height=2.955 LowStr=0.83 MaxWidthLoc=-0.75166 TopStr=0.599876 TopTanAngle=80.6639 UpStr=0.83 Width=2.42422
    2  1            0            0            point

Human "Pilot", child of "Cockpit"
  location (X Y Z) 11.87 0 0.99, rotation 0 17 0
  bounding box size 3.50264 1.90276 4.01536
  mass: Density=69.1628 Shell_Flag=0 Mass_Area=1 Mass_Prior=0
  Anthropometric: Age=30 AutoDensity=1 BMI=27.7 BMI_pct=0.5 GenderFlag=0 LenUnit=4 Mass=188.306 MassUnit=3 SitFrac=0.51 Stature=5.76115 Stature_pct=0.5 Volume=2.72264

Custom "Seat", child of "Pilot"
  location (X Y Z) 11.464 0 0.109, rotation 0 -72.957 0
  bounding box size 2.5161 1.0509 3.59331
  Design: BackAngle=0 BackHeight=2.70075 BackThick=0.414 SeatHeight=0.35 SeatLength=1.426 Width=1.0509
  custom script Seat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

Custom "Stick", child of "Pilot"
  location (X Y Z) 10.5 0 1.304, rotation 0 7 0
  bounding box size 0.215778 0.2 1.00896
  Design: Height=1.005 Length=0.094 SquareFlag=0 Width=0.2
  custom script Box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

Custom "PodMan (for reference)", child of "Pilot"
  location (X Y Z) 12.239 0 3.261, rotation -180 84.63 -180; relative location 12.239 0 3.261, rotation 0 95.37 0
  bounding box size 2.6783 1.77143 4.19119
  Design: ElbowAngle=10.0008 Height=5 HipAngle=93.545 KneeAngle=-70 PresetTrigger=0 Presets=1 ShoulderAngle=4.5
  custom script PodMan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

Custom "Floor", child of "Pilot"
  location (X Y Z) 8.978 0 -0.761, rotation 0 0 0
  bounding box size 5 1.469 0.2
  Design: Height=0.2 Length=5 SquareFlag=0 Width=1.469
  custom script Box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

Custom "Pedal", child of "Pilot"
  location (X Y Z) 9.087 0 -0.326, rotation 0 -30 0
  bounding box size 0.382603 0.2 0.562687
  Design: Height=0.592 Length=0.1 SquareFlag=0 Width=0.2
  custom script Box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

Custom "Console", child of "Pilot"
  location (X Y Z) 8.00022 0 1.25, rotation 0 -5.543 0
  bounding box size 0.990003 1.083 1.88065
  Design: Height=1.81 Length=0.819 SquareFlag=0 Width=1.083
  custom script Box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

Custom "Ankle Ref Point", child of "Pilot"
  location (X Y Z) 9.689 0 -0.109, rotation 0 0 0
  bounding box size 0 0.455 0.455
  Design: Diameter=0.455
  custom script Disk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

Fuselage "Avionics", child of "Main Fuselage"
  location (X Y Z) 3.93443 0 0, rotation 0 0 0
  bounding box size 4.65359 2.48187 2.48187
  Design: Length=4
  cross sections:
    n  XLocPercent  YLocPercent  ZLocPercent  shape
    0  0            0            0            circle Circle_Diameter=2.48187
    1  1            0            0            as above

Fuselage "Avionics", child of "Avionics"
  location (X Y Z) 13.8525 0 0, rotation 0 0 0
  bounding box size 4 2.48187 2.48187
  Design: Length=4
  cross sections:
    n  XLocPercent  YLocPercent  ZLocPercent  shape
    0  0            0            0            rounded rectangle RoundRectXSec_Radius=0.2 RoundedRect_Height=2.48187 RoundedRect_Width=2.48187
    1  1            0            0            as above

Wing "Wing Fuel", child of "Main Fuselage"
  location (X Y Z) 21.0119 2.9 0, rotation 0 0 0
  symmetric about XZ
  bounding box size 16.7288 27.2115 1.65043
  totals: TotalSpan=21.2203 TotalProjectedSpan=21.2203 TotalChord=10.2848 TotalArea=200.411 TotalAR=2.2469 MAC=9.9217
  root: chord 13.5858, twist 0, NACA 4-series Camber=0 CamberLoc=0.2 ThickChord=0.121429
  sections:
    n  Span     Root_Chord  Tip_Chord  Area     Sweep    Sweep_Location  Dihedral  Twist  Twist_Location  tip airfoil
    1  2.9654   13.5858     10.7952    36.1496  39.3238  0.25            0         0      0.25            NACA 64-series A=1 IdealCl=0 ThickChord=0.04
    2  7.64477  10.7952     5.9629     64.0559  40.0712  0.25            0         0      0.25            as above
  SS_Control "Ailerons": UStart=0.64878 UEnd=0.740196 Length_C_Start=0.165517 Length_C_End=0.165517 Length_Start=1.3108 Length_End=1.01833 LE_Flag=0 Surf_Type=2
  SS_Control "Fowler Flaps": UStart=0.507317 UEnd=0.637255 Length_C_Start=0.165517 Length_C_End=0.165517 Length_Start=1.76338 Length_End=1.34767 LE_Flag=0 Surf_Type=2

Wing "Rear Fuel", child of "Wing Fuel"
  location (X Y Z) 33.6885 2.9 0, rotation 0 0 0
  symmetric about XZ
  bounding box size 12.4323 10.4561 1.22917
  totals: TotalSpan=4.65613 TotalProjectedSpan=4.65613 TotalChord=11.6423 TotalArea=54.208 TotalAR=0.399932 MAC=11.6541
  root: chord 12.2846, twist 0, NACA 4-series Camber=0 CamberLoc=0.2 ThickChord=0.1
  sections:
    n  Span     Root_Chord  Tip_Chord  Area    Sweep    Sweep_Location  Dihedral  Twist  Twist_Location  tip airfoil
    1  2.32806  12.2846     11         27.104  31.6014  0               0         0      0.25            NACA 4-series Camber=0 CamberLoc=0.2 ThickChord=0.025

Wing "Vstab Fuel", child of "Wing Fuel"
  location (X Y Z) 36.8934 4.75 0, rotation 67 0 0
  symmetric about XZ
  bounding box size 6.89751 15.7671 6.57383
  totals: TotalSpan=13.2937 TotalProjectedSpan=13.2937 TotalChord=4.40809 TotalArea=48.6365 TotalAR=3.63351 MAC=3.96226
  root: chord 5.72296, twist 0, NACA 4-series Camber=0 CamberLoc=0.2 ThickChord=0.203571
  sections:
    n  Span      Root_Chord  Tip_Chord  Area     Sweep    Sweep_Location  Dihedral  Twist  Twist_Location  tip airfoil
    1  0.740741  5.72296     5.02206    3.97964  32.3843  0               -360      0      0.25            NACA 4-series Camber=0 CamberLoc=0.2 ThickChord=0.1
    2  5.90609   5.02206     1.86528    20.3386  30.427   0.346429        0         0      0.25            NACA 64-series A=1 IdealCl=0 ThickChord=0.02

Fuselage "Center Fuel", child of "Wing Fuel"
  location (X Y Z) 19.0164 0 0, rotation 0 0 0
  bounding box size 8.18821 4.3 4.3
  Design: Length=6.03821
  cross sections:
    n  XLocPercent  YLocPercent  ZLocPercent  shape
    0  0            0            0            circle Circle_Diameter=4.3
    1  1            0            0            as above

Fuselage "Engine", child of "Main Fuselage"
  location (X Y Z) 29.5 0 0, rotation 0 0 0
  bounding box size 18.5 3.83 3.83
  Design: Length=18.5
  cross sections:
    n  XLocPercent  YLocPercent  ZLocPercent  shape
    0  0            0            0            circle Circle_Diameter=3.83
    1  0.5          0            0            as above
    2  0.838776     0            0            as above
    3  1            0            0            circle Circle_Diameter=3.36641

Fuselage "Intake", child of "Engine"
  location (X Y Z) 30 0 0, rotation -180 0 -180; relative location 30 0 0, rotation 0 180 0
  symmetric about XZ
  bounding box size 7.9645 11.1169 4.23172
  Design: Length=7.78163
  cross sections:
    n  XLocPercent  XRotate  YLocPercent  ZLocPercent  ZRotate   shape
    0  0            0        0            0            0         circle Circle_Diameter=3.83
    1  1            2.88256  -0.5         0.142857     -6.08541  rounded rectangle RoundRectXSec_Radius=0.2 RoundRect_Skew=0.857143 RoundedRect_Height=2.22857 RoundedRect_Width=2.09184

Fuselage "Simplified Fuselage", child of "Main Fuselage"
  location (X Y Z) 0 0 0, rotation 0 0 0
  bounding box size 45.5 13.6088 6.52272
  Design: Length=45.5
  cross sections:
    n  XLocPercent  YLocPercent  ZLocPercent  shape
    0  0            0            0            point
    1  0.327755     0            0            wedge Chord=5.01874 DuLow=0.1 DuUp=0.1 FlatLow=0 FlatUp=0 SymmThick=1 ThickChord=1 ThickLoc=0.5 ThickLocLow=0.5 UForeLow=0.25 UForeUp=0.75 ZCamber=0
    2  0.55         0            0            ellipse Ellipse_Height=5.64138 Ellipse_Width=13.6088
    3  0.908163     0            0            as above
    4  1            0            0            circle Circle_Diameter=4.31298

Fuselage "Hardpoint 1"
  location (X Y Z) 27 8.33333 -0.491803, rotation 0 0 0
  symmetric about XZ
  bounding box size 7 16.9207 0.6
  Design: Length=7
  cross sections:
    n  XLocPercent  YLocPercent  ZLocPercent  shape
    0  0            0            -0.04        general fuselage BotStr=1.83 BotTanAngle=90 CornerRad=0 Height=0 LowStr=1.83 MaxWidthLoc=0 TopStr=1.83 TopTanAngle=90 UpStr=1.83 Width=0.25
    1  0.142857     0            0            rounded rectangle RoundRectXSec_Radius=0.02 RoundedRect_Height=0.6 RoundedRect_Width=0.25
    2  1            0            0            as above

Fuselage "Ext. Fuel Tanks", child of "Hardpoint 1"
  location (X Y Z) 21 8.33333 -1.96721, rotation 0 0 0
  symmetric about XZ
  bounding box size 17.1657 19.1667 2.5
  Design: Length=17
  cross sections:
    n  XLocPercent  YLocPercent  ZLocPercent  shape
    0  0            0            0            point
    1  0.25         0            0            circle Circle_Diameter=2.5
    2  0.5          0            0            as above
    3  0.846939     0            0            as above
    4  1            0            0            circle Circle_Diameter=0.8

Fuselage "Hardpoint 2"
  location (X Y Z) 30 12 -0.491803, rotation 0 0 0
  symmetric about XZ
  bounding box size 7 24.254 0.6
  Design: Length=7
  cross sections:
    n  XLocPercent  YLocPercent  ZLocPercent  shape
    0  0            0            -0.04        general fuselage BotStr=1.83 BotTanAngle=90 CornerRad=0 Height=0 LowStr=1.83 MaxWidthLoc=0 TopStr=1.83 TopTanAngle=90 UpStr=1.83 Width=0.25
    1  0.142857     0            0            rounded rectangle RoundRectXSec_Radius=0.02 RoundedRect_Height=0.6 RoundedRect_Width=0.25
    2  1            0            0            as above

Fuselage "AMRAAM", child of "Hardpoint 2"
  location (X Y Z) 27 12 -1, rotation 45 0 0
  bounding box size 12 0.947292 0.947292
  Design: Length=12
  cross sections:
    n  XLocPercent  YLocPercent  ZLocPercent  shape
    0  0            0            0            point
    1  0.2          0            0            circle Circle_Diameter=0.6
    2  0.5          0            0            as above
    3  1            0            0            as above

Wing "WingGeom", child of "AMRAAM"
  location (X Y Z) 37.5 12 -1, rotation 45 0 0; relative location 10.5 0 0, rotation 0 0 0
  symmetric about XZ
  bounding box size 1.5 1.46732 1.46732
  totals: TotalSpan=2 TotalProjectedSpan=2 TotalChord=1 TotalArea=2 TotalAR=2 MAC=1.08333
  root: chord 1.5, twist 0, NACA 4-series Camber=0 CamberLoc=0.2 ThickChord=0.05
  sections:
    n  Span  Root_Chord  Tip_Chord  Area  Sweep  Sweep_Location  Dihedral  Twist  Twist_Location  tip airfoil
    1  1     1.5         0.5        1     45     0               0         0      0.25            NACA 4-series Camber=0 CamberLoc=0.2 ThickChord=0.02

Wing "WingGeom", child of "AMRAAM"
  location (X Y Z) 37.5 12 -1, rotation 135 0 0; relative location 10.5 0 0, rotation 90 0 0
  symmetric about XY
  bounding box size 1.5 1.46732 1.46732
  totals: TotalSpan=2 TotalProjectedSpan=2 TotalChord=1 TotalArea=2 TotalAR=2 MAC=1.08333
  root: chord 1.5, twist 0, NACA 4-series Camber=0 CamberLoc=0.2 ThickChord=0.05
  sections:
    n  Span  Root_Chord  Tip_Chord  Area  Sweep  Sweep_Location  Dihedral  Twist  Twist_Location  tip airfoil
    1  1     1.5         0.5        1     45     0               0         0      0.25            NACA 4-series Camber=0 CamberLoc=0.2 ThickChord=0.02

Wing "WingGeom", child of "AMRAAM"
  location (X Y Z) 32.7 12 -1, rotation 45 0 0; relative location 5.7 0 0, rotation 0 0 0
  symmetric about XZ
  bounding box size 1 1.09607 1.09607
  totals: TotalSpan=1.5 TotalProjectedSpan=1.5 TotalChord=0.625 TotalArea=0.9375 TotalAR=2.4 MAC=0.7
  root: chord 1, twist 0, NACA 4-series Camber=0 CamberLoc=0.2 ThickChord=0.05
  sections:
    n  Span  Root_Chord  Tip_Chord  Area     Sweep  Sweep_Location  Dihedral  Twist  Twist_Location  tip airfoil
    1  0.75  1           0.25       0.46875  0      0.996429        0         0      0.25            NACA 4-series Camber=0 CamberLoc=0.2 ThickChord=0.02

Wing "WingGeom", child of "AMRAAM"
  location (X Y Z) 32.7 12 -1, rotation 135 0 0; relative location 5.7 0 0, rotation 90 0 0
  symmetric about XY
  bounding box size 1 1.09607 1.09607
  totals: TotalSpan=1.5 TotalProjectedSpan=1.5 TotalChord=0.625 TotalArea=0.9375 TotalAR=2.4 MAC=0.7
  root: chord 1, twist 0, NACA 4-series Camber=0 CamberLoc=0.2 ThickChord=0.05
  sections:
    n  Span  Root_Chord  Tip_Chord  Area     Sweep  Sweep_Location  Dihedral  Twist  Twist_Location  tip airfoil
    1  0.75  1           0.25       0.46875  0      0.996429        0         0      0.25            NACA 4-series Camber=0 CamberLoc=0.2 ThickChord=0.02

Fuselage "AMRAAM", child of "Hardpoint 2"
  location (X Y Z) 27 -12 -1, rotation 45 0 0
  bounding box size 12 0.947292 0.947292
  Design: Length=12
  cross sections:
    n  XLocPercent  YLocPercent  ZLocPercent  shape
    0  0            0            0            point
    1  0.2          0            0            circle Circle_Diameter=0.6
    2  0.5          0            0            as above
    3  1            0            0            as above

Wing "WingGeom", child of "AMRAAM"
  location (X Y Z) 37.5 -12 -1, rotation 45 0 0; relative location 10.5 0 0, rotation 0 0 0
  symmetric about XZ
  bounding box size 1.5 1.46732 1.46732
  totals: TotalSpan=2 TotalProjectedSpan=2 TotalChord=1 TotalArea=2 TotalAR=2 MAC=1.08333
  root: chord 1.5, twist 0, NACA 4-series Camber=0 CamberLoc=0.2 ThickChord=0.05
  sections:
    n  Span  Root_Chord  Tip_Chord  Area  Sweep  Sweep_Location  Dihedral  Twist  Twist_Location  tip airfoil
    1  1     1.5         0.5        1     45     0               0         0      0.25            NACA 4-series Camber=0 CamberLoc=0.2 ThickChord=0.02

Wing "WingGeom", child of "AMRAAM"
  location (X Y Z) 37.5 -12 -1, rotation 135 0 0; relative location 10.5 0 0, rotation 90 0 0
  symmetric about XY
  bounding box size 1.5 1.46732 1.46732
  totals: TotalSpan=2 TotalProjectedSpan=2 TotalChord=1 TotalArea=2 TotalAR=2 MAC=1.08333
  root: chord 1.5, twist 0, NACA 4-series Camber=0 CamberLoc=0.2 ThickChord=0.05
  sections:
    n  Span  Root_Chord  Tip_Chord  Area  Sweep  Sweep_Location  Dihedral  Twist  Twist_Location  tip airfoil
    1  1     1.5         0.5        1     45     0               0         0      0.25            NACA 4-series Camber=0 CamberLoc=0.2 ThickChord=0.02

Wing "WingGeom", child of "AMRAAM"
  location (X Y Z) 32.7 -12 -1, rotation 45 0 0; relative location 5.7 0 0, rotation 0 0 0
  symmetric about XZ
  bounding box size 1 1.09607 1.09607
  totals: TotalSpan=1.5 TotalProjectedSpan=1.5 TotalChord=0.625 TotalArea=0.9375 TotalAR=2.4 MAC=0.7
  root: chord 1, twist 0, NACA 4-series Camber=0 CamberLoc=0.2 ThickChord=0.05
  sections:
    n  Span  Root_Chord  Tip_Chord  Area     Sweep  Sweep_Location  Dihedral  Twist  Twist_Location  tip airfoil
    1  0.75  1           0.25       0.46875  0      0.996429        0         0      0.25            NACA 4-series Camber=0 CamberLoc=0.2 ThickChord=0.02

Wing "WingGeom", child of "AMRAAM"
  location (X Y Z) 32.7 -12 -1, rotation 135 0 0; relative location 5.7 0 0, rotation 90 0 0
  symmetric about XY
  bounding box size 1 1.09607 1.09607
  totals: TotalSpan=1.5 TotalProjectedSpan=1.5 TotalChord=0.625 TotalArea=0.9375 TotalAR=2.4 MAC=0.7
  root: chord 1, twist 0, NACA 4-series Camber=0 CamberLoc=0.2 ThickChord=0.05
  sections:
    n  Span  Root_Chord  Tip_Chord  Area     Sweep  Sweep_Location  Dihedral  Twist  Twist_Location  tip airfoil
    1  0.75  1           0.25       0.46875  0      0.996429        0         0      0.25            NACA 4-series Camber=0 CamberLoc=0.2 ThickChord=0.02

Fuselage "Hardpoint 3"
  location (X Y Z) 30.8333 15.5 -0.491803, rotation 0 0 0
  symmetric about XZ
  bounding box size 7 31.254 0.6
  Design: Length=7
  cross sections:
    n  XLocPercent  YLocPercent  ZLocPercent  shape
    0  0            0            -0.04        general fuselage BotStr=1.83 BotTanAngle=90 CornerRad=0 Height=0 LowStr=1.83 MaxWidthLoc=0 TopStr=1.83 TopTanAngle=90 UpStr=1.83 Width=0.25
    1  0.142857     0            0            rounded rectangle RoundRectXSec_Radius=0.02 RoundedRect_Height=0.6 RoundedRect_Width=0.25
    2  1            0            0            as above

Fuselage "AMRAAM", child of "Hardpoint 3"
  location (X Y Z) 27.8333 15.5 -1, rotation 45 0 0
  bounding box size 12 0.947292 0.947292
  Design: Length=12
  cross sections:
    n  XLocPercent  YLocPercent  ZLocPercent  shape
    0  0            0            0            point
    1  0.2          0            0            circle Circle_Diameter=0.6
    2  0.5          0            0            as above
    3  1            0            0            as above

Wing "WingGeom", child of "AMRAAM"
  location (X Y Z) 38.3333 15.5 -1, rotation 45 0 0; relative location 10.5 0 0, rotation 0 0 0
  symmetric about XZ
  bounding box size 1.5 1.46732 1.46732
  totals: TotalSpan=2 TotalProjectedSpan=2 TotalChord=1 TotalArea=2 TotalAR=2 MAC=1.08333
  root: chord 1.5, twist 0, NACA 4-series Camber=0 CamberLoc=0.2 ThickChord=0.05
  sections:
    n  Span  Root_Chord  Tip_Chord  Area  Sweep  Sweep_Location  Dihedral  Twist  Twist_Location  tip airfoil
    1  1     1.5         0.5        1     45     0               0         0      0.25            NACA 4-series Camber=0 CamberLoc=0.2 ThickChord=0.02

Wing "WingGeom", child of "AMRAAM"
  location (X Y Z) 38.3333 15.5 -1, rotation 135 0 0; relative location 10.5 0 0, rotation 90 0 0
  symmetric about XY
  bounding box size 1.5 1.46732 1.46732
  totals: TotalSpan=2 TotalProjectedSpan=2 TotalChord=1 TotalArea=2 TotalAR=2 MAC=1.08333
  root: chord 1.5, twist 0, NACA 4-series Camber=0 CamberLoc=0.2 ThickChord=0.05
  sections:
    n  Span  Root_Chord  Tip_Chord  Area  Sweep  Sweep_Location  Dihedral  Twist  Twist_Location  tip airfoil
    1  1     1.5         0.5        1     45     0               0         0      0.25            NACA 4-series Camber=0 CamberLoc=0.2 ThickChord=0.02

Wing "WingGeom", child of "AMRAAM"
  location (X Y Z) 33.5333 15.5 -1, rotation 45 0 0; relative location 5.7 0 0, rotation 0 0 0
  symmetric about XZ
  bounding box size 1 1.09607 1.09607
  totals: TotalSpan=1.5 TotalProjectedSpan=1.5 TotalChord=0.625 TotalArea=0.9375 TotalAR=2.4 MAC=0.7
  root: chord 1, twist 0, NACA 4-series Camber=0 CamberLoc=0.2 ThickChord=0.05
  sections:
    n  Span  Root_Chord  Tip_Chord  Area     Sweep  Sweep_Location  Dihedral  Twist  Twist_Location  tip airfoil
    1  0.75  1           0.25       0.46875  0      0.996429        0         0      0.25            NACA 4-series Camber=0 CamberLoc=0.2 ThickChord=0.02

Wing "WingGeom", child of "AMRAAM"
  location (X Y Z) 33.5333 15.5 -1, rotation 135 0 0; relative location 5.7 0 0, rotation 90 0 0
  symmetric about XY
  bounding box size 1 1.09607 1.09607
  totals: TotalSpan=1.5 TotalProjectedSpan=1.5 TotalChord=0.625 TotalArea=0.9375 TotalAR=2.4 MAC=0.7
  root: chord 1, twist 0, NACA 4-series Camber=0 CamberLoc=0.2 ThickChord=0.05
  sections:
    n  Span  Root_Chord  Tip_Chord  Area     Sweep  Sweep_Location  Dihedral  Twist  Twist_Location  tip airfoil
    1  0.75  1           0.25       0.46875  0      0.996429        0         0      0.25            NACA 4-series Camber=0 CamberLoc=0.2 ThickChord=0.02

Fuselage "AMRAAM", child of "Hardpoint 3"
  location (X Y Z) 27.8333 -15.5 -1, rotation 45 0 0
  bounding box size 12 0.947292 0.947292
  Design: Length=12
  cross sections:
    n  XLocPercent  YLocPercent  ZLocPercent  shape
    0  0            0            0            point
    1  0.2          0            0            circle Circle_Diameter=0.6
    2  0.5          0            0            as above
    3  1            0            0            as above

Wing "WingGeom", child of "AMRAAM"
  location (X Y Z) 38.3333 -15.5 -1, rotation 45 0 0; relative location 10.5 0 0, rotation 0 0 0
  symmetric about XZ
  bounding box size 1.5 1.46732 1.46732
  totals: TotalSpan=2 TotalProjectedSpan=2 TotalChord=1 TotalArea=2 TotalAR=2 MAC=1.08333
  root: chord 1.5, twist 0, NACA 4-series Camber=0 CamberLoc=0.2 ThickChord=0.05
  sections:
    n  Span  Root_Chord  Tip_Chord  Area  Sweep  Sweep_Location  Dihedral  Twist  Twist_Location  tip airfoil
    1  1     1.5         0.5        1     45     0               0         0      0.25            NACA 4-series Camber=0 CamberLoc=0.2 ThickChord=0.02

Wing "WingGeom", child of "AMRAAM"
  location (X Y Z) 38.3333 -15.5 -1, rotation 135 0 0; relative location 10.5 0 0, rotation 90 0 0
  symmetric about XY
  bounding box size 1.5 1.46732 1.46732
  totals: TotalSpan=2 TotalProjectedSpan=2 TotalChord=1 TotalArea=2 TotalAR=2 MAC=1.08333
  root: chord 1.5, twist 0, NACA 4-series Camber=0 CamberLoc=0.2 ThickChord=0.05
  sections:
    n  Span  Root_Chord  Tip_Chord  Area  Sweep  Sweep_Location  Dihedral  Twist  Twist_Location  tip airfoil
    1  1     1.5         0.5        1     45     0               0         0      0.25            NACA 4-series Camber=0 CamberLoc=0.2 ThickChord=0.02

Wing "WingGeom", child of "AMRAAM"
  location (X Y Z) 33.5333 -15.5 -1, rotation 45 0 0; relative location 5.7 0 0, rotation 0 0 0
  symmetric about XZ
  bounding box size 1 1.09607 1.09607
  totals: TotalSpan=1.5 TotalProjectedSpan=1.5 TotalChord=0.625 TotalArea=0.9375 TotalAR=2.4 MAC=0.7
  root: chord 1, twist 0, NACA 4-series Camber=0 CamberLoc=0.2 ThickChord=0.05
  sections:
    n  Span  Root_Chord  Tip_Chord  Area     Sweep  Sweep_Location  Dihedral  Twist  Twist_Location  tip airfoil
    1  0.75  1           0.25       0.46875  0      0.996429        0         0      0.25            NACA 4-series Camber=0 CamberLoc=0.2 ThickChord=0.02

Wing "WingGeom", child of "AMRAAM"
  location (X Y Z) 33.5333 -15.5 -1, rotation 135 0 0; relative location 5.7 0 0, rotation 90 0 0
  symmetric about XY
  bounding box size 1 1.09607 1.09607
  totals: TotalSpan=1.5 TotalProjectedSpan=1.5 TotalChord=0.625 TotalArea=0.9375 TotalAR=2.4 MAC=0.7
  root: chord 1, twist 0, NACA 4-series Camber=0 CamberLoc=0.2 ThickChord=0.05
  sections:
    n  Span  Root_Chord  Tip_Chord  Area     Sweep  Sweep_Location  Dihedral  Twist  Twist_Location  tip airfoil
    1  0.75  1           0.25       0.46875  0      0.996429        0         0      0.25            NACA 4-series Camber=0 CamberLoc=0.2 ThickChord=0.02

Fuselage "Hardpoint 4"
  location (X Y Z) 34.5164 20 0, rotation 90 0 0
  symmetric about XZ
  bounding box size 5.90571 40.4725 0.177816
  Design: Length=5.90571
  cross sections:
    n  XLocPercent  YLocPercent  ZLocPercent  shape
    0  0            0            -0.04        general fuselage BotStr=1.83 BotTanAngle=90 CornerRad=0 Height=0 LowStr=1.83 MaxWidthLoc=0 TopStr=1.83 TopTanAngle=90 UpStr=1.83 Width=0.175
    1  0.142857     0            0            rounded rectangle RoundRectXSec_Radius=0.014 RoundedRect_Height=0.42 RoundedRect_Width=0.175
    2  1            0            0            as above

Fuselage "Sidewinder", child of "Hardpoint 4"
  location (X Y Z) 31.9918 20.4 0, rotation 45 0 0
  bounding box size 9.25 0.707107 0.707107
  Design: Length=9
  cross sections:
    n  XLocPercent  YLocPercent  ZLocPercent  shape
    0  0            0            0            circle Circle_Diameter=0.5
    1  0.5          0            0            as above
    2  1            0            0            as above

Wing "WingGeom", child of "Sidewinder"
  location (X Y Z) 38.4918 20.4 0, rotation 45 0 0; relative location 6.5 0 0, rotation 0 0 0
  symmetric about XZ
  bounding box size 2.5 1.50273 1.50273
  totals: TotalSpan=2 TotalProjectedSpan=2 TotalChord=2 TotalArea=4 TotalAR=1 MAC=2.04167
  root: chord 2.5, twist 0, NACA 4-series Camber=0 CamberLoc=0.2 ThickChord=0.05
  sections:
    n  Span  Root_Chord  Tip_Chord  Area  Sweep  Sweep_Location  Dihedral  Twist  Twist_Location  tip airfoil
    1  1     2.5         1.5        2     45     0               0         0      0.25            NACA 4-series Camber=0 CamberLoc=0.2 ThickChord=0.02

Wing "WingGeom", child of "Sidewinder"
  location (X Y Z) 38.4918 20.4 0, rotation 135 0 0; relative location 6.5 0 0, rotation 90 0 0
  symmetric about XY
  bounding box size 2.5 1.50273 1.50273
  totals: TotalSpan=2 TotalProjectedSpan=2 TotalChord=2 TotalArea=4 TotalAR=1 MAC=2.04167
  root: chord 2.5, twist 0, NACA 4-series Camber=0 CamberLoc=0.2 ThickChord=0.05
  sections:
    n  Span  Root_Chord  Tip_Chord  Area  Sweep  Sweep_Location  Dihedral  Twist  Twist_Location  tip airfoil
    1  1     2.5         1.5        2     45     0               0         0      0.25            NACA 4-series Camber=0 CamberLoc=0.2 ThickChord=0.02

Wing "WingGeom", child of "Sidewinder"
  location (X Y Z) 32.6918 20.4 0, rotation 45 0 0; relative location 0.7 0 0, rotation 0 0 0
  symmetric about XZ
  bounding box size 1 1.44962 1.44962
  totals: TotalSpan=2 TotalProjectedSpan=2 TotalChord=0.625 TotalArea=1.25 TotalAR=3.2 MAC=0.7
  root: chord 1, twist 0, NACA 4-series Camber=0 CamberLoc=0.2 ThickChord=0.05
  sections:
    n  Span  Root_Chord  Tip_Chord  Area   Sweep  Sweep_Location  Dihedral  Twist  Twist_Location  tip airfoil
    1  1     1           0.25       0.625  0      0.996429        0         0      0.25            NACA 4-series Camber=0 CamberLoc=0.2 ThickChord=0.02

Wing "WingGeom", child of "Sidewinder"
  location (X Y Z) 32.6918 20.4 0, rotation 135 0 0; relative location 0.7 0 0, rotation 90 0 0
  symmetric about XY
  bounding box size 1 1.44962 1.44962
  totals: TotalSpan=2 TotalProjectedSpan=2 TotalChord=0.625 TotalArea=1.25 TotalAR=3.2 MAC=0.7
  root: chord 1, twist 0, NACA 4-series Camber=0 CamberLoc=0.2 ThickChord=0.05
  sections:
    n  Span  Root_Chord  Tip_Chord  Area   Sweep  Sweep_Location  Dihedral  Twist  Twist_Location  tip airfoil
    1  1     1           0.25       0.625  0      0.996429        0         0      0.25            NACA 4-series Camber=0 CamberLoc=0.2 ThickChord=0.02

Fuselage "Sidewinder", child of "Hardpoint 4"
  location (X Y Z) 31.9918 -20.4 0, rotation 45 0 0
  bounding box size 9.25 0.707107 0.707107
  Design: Length=9
  cross sections:
    n  XLocPercent  YLocPercent  ZLocPercent  shape
    0  0            0            0            circle Circle_Diameter=0.5
    1  0.5          0            0            as above
    2  1            0            0            as above

Wing "WingGeom", child of "Sidewinder"
  location (X Y Z) 38.4918 -20.4 0, rotation 45 0 0; relative location 6.5 0 0, rotation 0 0 0
  symmetric about XZ
  bounding box size 2.5 1.50273 1.50273
  totals: TotalSpan=2 TotalProjectedSpan=2 TotalChord=2 TotalArea=4 TotalAR=1 MAC=2.04167
  root: chord 2.5, twist 0, NACA 4-series Camber=0 CamberLoc=0.2 ThickChord=0.05
  sections:
    n  Span  Root_Chord  Tip_Chord  Area  Sweep  Sweep_Location  Dihedral  Twist  Twist_Location  tip airfoil
    1  1     2.5         1.5        2     45     0               0         0      0.25            NACA 4-series Camber=0 CamberLoc=0.2 ThickChord=0.02

Wing "WingGeom", child of "Sidewinder"
  location (X Y Z) 38.4918 -20.4 0, rotation 135 0 0; relative location 6.5 0 0, rotation 90 0 0
  symmetric about XY
  bounding box size 2.5 1.50273 1.50273
  totals: TotalSpan=2 TotalProjectedSpan=2 TotalChord=2 TotalArea=4 TotalAR=1 MAC=2.04167
  root: chord 2.5, twist 0, NACA 4-series Camber=0 CamberLoc=0.2 ThickChord=0.05
  sections:
    n  Span  Root_Chord  Tip_Chord  Area  Sweep  Sweep_Location  Dihedral  Twist  Twist_Location  tip airfoil
    1  1     2.5         1.5        2     45     0               0         0      0.25            NACA 4-series Camber=0 CamberLoc=0.2 ThickChord=0.02

Wing "WingGeom", child of "Sidewinder"
  location (X Y Z) 32.6918 -20.4 0, rotation 45 0 0; relative location 0.7 0 0, rotation 0 0 0
  symmetric about XZ
  bounding box size 1 1.44962 1.44962
  totals: TotalSpan=2 TotalProjectedSpan=2 TotalChord=0.625 TotalArea=1.25 TotalAR=3.2 MAC=0.7
  root: chord 1, twist 0, NACA 4-series Camber=0 CamberLoc=0.2 ThickChord=0.05
  sections:
    n  Span  Root_Chord  Tip_Chord  Area   Sweep  Sweep_Location  Dihedral  Twist  Twist_Location  tip airfoil
    1  1     1           0.25       0.625  0      0.996429        0         0      0.25            NACA 4-series Camber=0 CamberLoc=0.2 ThickChord=0.02

Wing "WingGeom", child of "Sidewinder"
  location (X Y Z) 32.6918 -20.4 0, rotation 135 0 0; relative location 0.7 0 0, rotation 90 0 0
  symmetric about XY
  bounding box size 1 1.44962 1.44962
  totals: TotalSpan=2 TotalProjectedSpan=2 TotalChord=0.625 TotalArea=1.25 TotalAR=3.2 MAC=0.7
  root: chord 1, twist 0, NACA 4-series Camber=0 CamberLoc=0.2 ThickChord=0.05
  sections:
    n  Span  Root_Chord  Tip_Chord  Area   Sweep  Sweep_Location  Dihedral  Twist  Twist_Location  tip airfoil
    1  1     1           0.25       0.625  0      0.996429        0         0      0.25            NACA 4-series Camber=0 CamberLoc=0.2 ThickChord=0.02

Fuselage "Internal Cargo Bay"
  location (X Y Z) 25 3.30612 -1.06557, rotation 30 0 0
  symmetric about XZ
  bounding box size 16 10.0586 2.87462
  Design: Length=16
  cross sections:
    n  XLocPercent  YLocPercent  ZLocPercent  shape
    0  0            0            0            rounded rectangle RoundRectXSec_Radius=0.2 RoundedRect_Height=1.5326 RoundedRect_Width=3.09471
    1  0.5          0            0            as above
    2  1            0            0            as above

Fuselage "AMRAAM", child of "Internal Cargo Bay"
  location (X Y Z) 27.6066 3.83634 -0.759451, rotation 75 0 0; relative location 2.60656 0.612245 0, rotation 45 0 0
  bounding box size 12 0.820379 0.820379
  Design: Length=12
  cross sections:
    n  XLocPercent  YLocPercent  ZLocPercent  shape
    0  0            0            0            point
    1  0.2          0            0            circle Circle_Diameter=0.6
    2  0.5          0            0            as above
    3  1            0            0            as above

Wing "WingGeom", child of "AMRAAM"
  location (X Y Z) 38.1066 3.83634 -0.759451, rotation 75 0 0; relative location 10.5 0 0, rotation 0 0 0
  symmetric about XZ
  bounding box size 1.5 0.590186 1.95129
  totals: TotalSpan=2 TotalProjectedSpan=2 TotalChord=1 TotalArea=2 TotalAR=2 MAC=1.08333
  root: chord 1.5, twist 0, NACA 4-series Camber=0 CamberLoc=0.2 ThickChord=0.05
  sections:
    n  Span  Root_Chord  Tip_Chord  Area  Sweep  Sweep_Location  Dihedral  Twist  Twist_Location  tip airfoil
    1  1     1.5         0.5        1     45     0               0         0      0.25            NACA 4-series Camber=0 CamberLoc=0.2 ThickChord=0.02

Wing "WingGeom", child of "AMRAAM"
  location (X Y Z) 38.1066 3.83634 -0.759451, rotation 165 0 0; relative location 10.5 0 0, rotation 90 0 0
  symmetric about XY
  bounding box size 1.5 1.95129 0.590186
  totals: TotalSpan=2 TotalProjectedSpan=2 TotalChord=1 TotalArea=2 TotalAR=2 MAC=1.08333
  root: chord 1.5, twist 0, NACA 4-series Camber=0 CamberLoc=0.2 ThickChord=0.05
  sections:
    n  Span  Root_Chord  Tip_Chord  Area  Sweep  Sweep_Location  Dihedral  Twist  Twist_Location  tip airfoil
    1  1     1.5         0.5        1     45     0               0         0      0.25            NACA 4-series Camber=0 CamberLoc=0.2 ThickChord=0.02

Wing "WingGeom", child of "AMRAAM"
  location (X Y Z) 33.3066 3.83634 -0.759451, rotation 75 0 0; relative location 5.7 0 0, rotation 0 0 0
  symmetric about XZ
  bounding box size 1 0.436594 1.46185
  totals: TotalSpan=1.5 TotalProjectedSpan=1.5 TotalChord=0.625 TotalArea=0.9375 TotalAR=2.4 MAC=0.7
  root: chord 1, twist 0, NACA 4-series Camber=0 CamberLoc=0.2 ThickChord=0.05
  sections:
    n  Span  Root_Chord  Tip_Chord  Area     Sweep  Sweep_Location  Dihedral  Twist  Twist_Location  tip airfoil
    1  0.75  1           0.25       0.46875  0      0.996429        0         0      0.25            NACA 4-series Camber=0 CamberLoc=0.2 ThickChord=0.02

Wing "WingGeom", child of "AMRAAM"
  location (X Y Z) 33.3066 3.83634 -0.759451, rotation 165 0 0; relative location 5.7 0 0, rotation 90 0 0
  symmetric about XY
  bounding box size 1 1.46185 0.436594
  totals: TotalSpan=1.5 TotalProjectedSpan=1.5 TotalChord=0.625 TotalArea=0.9375 TotalAR=2.4 MAC=0.7
  root: chord 1, twist 0, NACA 4-series Camber=0 CamberLoc=0.2 ThickChord=0.05
  sections:
    n  Span  Root_Chord  Tip_Chord  Area     Sweep  Sweep_Location  Dihedral  Twist  Twist_Location  tip airfoil
    1  0.75  1           0.25       0.46875  0      0.996429        0         0      0.25            NACA 4-series Camber=0 CamberLoc=0.2 ThickChord=0.02

Fuselage "AMRAAM", child of "Internal Cargo Bay"
  location (X Y Z) 27.607 2.66986 -1.43292, rotation 75 0 0; relative location 2.607 -0.734694 0, rotation 45 0 0
  bounding box size 12 0.820379 0.820379
  Design: Length=12
  cross sections:
    n  XLocPercent  YLocPercent  ZLocPercent  shape
    0  0            0            0            point
    1  0.2          0            0            circle Circle_Diameter=0.6
    2  0.5          0            0            as above
    3  1            0            0            as above

Wing "WingGeom", child of "AMRAAM"
  location (X Y Z) 38.107 2.66986 -1.43292, rotation 75 0 0; relative location 10.5 0 0, rotation 0 0 0
  symmetric about XZ
  bounding box size 1.5 0.590186 1.95129
  totals: TotalSpan=2 TotalProjectedSpan=2 TotalChord=1 TotalArea=2 TotalAR=2 MAC=1.08333
  root: chord 1.5, twist 0, NACA 4-series Camber=0 CamberLoc=0.2 ThickChord=0.05
  sections:
    n  Span  Root_Chord  Tip_Chord  Area  Sweep  Sweep_Location  Dihedral  Twist  Twist_Location  tip airfoil
    1  1     1.5         0.5        1     45     0               0         0      0.25            NACA 4-series Camber=0 CamberLoc=0.2 ThickChord=0.02

Wing "WingGeom", child of "AMRAAM"
  location (X Y Z) 38.107 2.66986 -1.43292, rotation 165 0 0; relative location 10.5 0 0, rotation 90 0 0
  symmetric about XY
  bounding box size 1.5 1.95129 0.590186
  totals: TotalSpan=2 TotalProjectedSpan=2 TotalChord=1 TotalArea=2 TotalAR=2 MAC=1.08333
  root: chord 1.5, twist 0, NACA 4-series Camber=0 CamberLoc=0.2 ThickChord=0.05
  sections:
    n  Span  Root_Chord  Tip_Chord  Area  Sweep  Sweep_Location  Dihedral  Twist  Twist_Location  tip airfoil
    1  1     1.5         0.5        1     45     0               0         0      0.25            NACA 4-series Camber=0 CamberLoc=0.2 ThickChord=0.02

Wing "WingGeom", child of "AMRAAM"
  location (X Y Z) 33.307 2.66986 -1.43292, rotation 75 0 0; relative location 5.7 0 0, rotation 0 0 0
  symmetric about XZ
  bounding box size 1 0.436594 1.46185
  totals: TotalSpan=1.5 TotalProjectedSpan=1.5 TotalChord=0.625 TotalArea=0.9375 TotalAR=2.4 MAC=0.7
  root: chord 1, twist 0, NACA 4-series Camber=0 CamberLoc=0.2 ThickChord=0.05
  sections:
    n  Span  Root_Chord  Tip_Chord  Area     Sweep  Sweep_Location  Dihedral  Twist  Twist_Location  tip airfoil
    1  0.75  1           0.25       0.46875  0      0.996429        0         0      0.25            NACA 4-series Camber=0 CamberLoc=0.2 ThickChord=0.02

Wing "WingGeom", child of "AMRAAM"
  location (X Y Z) 33.307 2.66986 -1.43292, rotation 165 0 0; relative location 5.7 0 0, rotation 90 0 0
  symmetric about XY
  bounding box size 1 1.46185 0.436594
  totals: TotalSpan=1.5 TotalProjectedSpan=1.5 TotalChord=0.625 TotalArea=0.9375 TotalAR=2.4 MAC=0.7
  root: chord 1, twist 0, NACA 4-series Camber=0 CamberLoc=0.2 ThickChord=0.05
  sections:
    n  Span  Root_Chord  Tip_Chord  Area     Sweep  Sweep_Location  Dihedral  Twist  Twist_Location  tip airfoil
    1  0.75  1           0.25       0.46875  0      0.996429        0         0      0.25            NACA 4-series Camber=0 CamberLoc=0.2 ThickChord=0.02

Fuselage "AMRAAM", child of "Internal Cargo Bay"
  location (X Y Z) 27.6066 -3.836 -0.759574, rotation -160 0 0; relative location 2.60656 -6.03226 3.83606, rotation 170 0 0
  bounding box size 12 0.858538 0.858538
  Design: Length=12
  cross sections:
    n  XLocPercent  YLocPercent  ZLocPercent  shape
    0  0            0            0            point
    1  0.2          0            0            circle Circle_Diameter=0.6
    2  0.5          0            0            as above
    3  1            0            0            as above

Wing "WingGeom", child of "AMRAAM"
  location (X Y Z) 38.1066 -3.836 -0.759574, rotation -160 0 0; relative location 10.5 0 0, rotation 0 0 0
  symmetric about XZ
  bounding box size 1.5 1.90507 0.754618
  totals: TotalSpan=2 TotalProjectedSpan=2 TotalChord=1 TotalArea=2 TotalAR=2 MAC=1.08333
  root: chord 1.5, twist 0, NACA 4-series Camber=0 CamberLoc=0.2 ThickChord=0.05
  sections:
    n  Span  Root_Chord  Tip_Chord  Area  Sweep  Sweep_Location  Dihedral  Twist  Twist_Location  tip airfoil
    1  1     1.5         0.5        1     45     0               0         0      0.25            NACA 4-series Camber=0 CamberLoc=0.2 ThickChord=0.02

Wing "WingGeom", child of "AMRAAM"
  location (X Y Z) 38.1066 -3.836 -0.759574, rotation -70 0 0; relative location 10.5 0 0, rotation 90 0 0
  symmetric about XY
  bounding box size 1.5 0.754618 1.90507
  totals: TotalSpan=2 TotalProjectedSpan=2 TotalChord=1 TotalArea=2 TotalAR=2 MAC=1.08333
  root: chord 1.5, twist 0, NACA 4-series Camber=0 CamberLoc=0.2 ThickChord=0.05
  sections:
    n  Span  Root_Chord  Tip_Chord  Area  Sweep  Sweep_Location  Dihedral  Twist  Twist_Location  tip airfoil
    1  1     1.5         0.5        1     45     0               0         0      0.25            NACA 4-series Camber=0 CamberLoc=0.2 ThickChord=0.02

Wing "WingGeom", child of "AMRAAM"
  location (X Y Z) 33.3066 -3.836 -0.759574, rotation -160 0 0; relative location 5.7 0 0, rotation 0 0 0
  symmetric about XZ
  bounding box size 1 1.42666 0.560082
  totals: TotalSpan=1.5 TotalProjectedSpan=1.5 TotalChord=0.625 TotalArea=0.9375 TotalAR=2.4 MAC=0.7
  root: chord 1, twist 0, NACA 4-series Camber=0 CamberLoc=0.2 ThickChord=0.05
  sections:
    n  Span  Root_Chord  Tip_Chord  Area     Sweep  Sweep_Location  Dihedral  Twist  Twist_Location  tip airfoil
    1  0.75  1           0.25       0.46875  0      0.996429        0         0      0.25            NACA 4-series Camber=0 CamberLoc=0.2 ThickChord=0.02

Wing "WingGeom", child of "AMRAAM"
  location (X Y Z) 33.3066 -3.836 -0.759574, rotation -70 0 0; relative location 5.7 0 0, rotation 90 0 0
  symmetric about XY
  bounding box size 1 0.560082 1.42666
  totals: TotalSpan=1.5 TotalProjectedSpan=1.5 TotalChord=0.625 TotalArea=0.9375 TotalAR=2.4 MAC=0.7
  root: chord 1, twist 0, NACA 4-series Camber=0 CamberLoc=0.2 ThickChord=0.05
  sections:
    n  Span  Root_Chord  Tip_Chord  Area     Sweep  Sweep_Location  Dihedral  Twist  Twist_Location  tip airfoil
    1  0.75  1           0.25       0.46875  0      0.996429        0         0      0.25            NACA 4-series Camber=0 CamberLoc=0.2 ThickChord=0.02

Fuselage "AMRAAM", child of "Internal Cargo Bay"
  location (X Y Z) 27.607 -2.67 -1.43292, rotation -165 0 0; relative location 2.607 -5.35915 2.66993, rotation 165 0 0
  bounding box size 12 0.820379 0.820379
  Design: Length=12
  cross sections:
    n  XLocPercent  YLocPercent  ZLocPercent  shape
    0  0            0            0            point
    1  0.2          0            0            circle Circle_Diameter=0.6
    2  0.5          0            0            as above
    3  1            0            0            as above

Wing "WingGeom", child of "AMRAAM"
  location (X Y Z) 38.107 -2.67 -1.43292, rotation -165 0 0; relative location 10.5 0 0, rotation 0 0 0
  symmetric about XZ
  bounding box size 1.5 1.95129 0.590186
  totals: TotalSpan=2 TotalProjectedSpan=2 TotalChord=1 TotalArea=2 TotalAR=2 MAC=1.08333
  root: chord 1.5, twist 0, NACA 4-series Camber=0 CamberLoc=0.2 ThickChord=0.05
  sections:
    n  Span  Root_Chord  Tip_Chord  Area  Sweep  Sweep_Location  Dihedral  Twist  Twist_Location  tip airfoil
    1  1     1.5         0.5        1     45     0               0         0      0.25            NACA 4-series Camber=0 CamberLoc=0.2 ThickChord=0.02

Wing "WingGeom", child of "AMRAAM"
  location (X Y Z) 38.107 -2.67 -1.43292, rotation -75 0 0; relative location 10.5 0 0, rotation 90 0 0
  symmetric about XY
  bounding box size 1.5 0.590186 1.95129
  totals: TotalSpan=2 TotalProjectedSpan=2 TotalChord=1 TotalArea=2 TotalAR=2 MAC=1.08333
  root: chord 1.5, twist 0, NACA 4-series Camber=0 CamberLoc=0.2 ThickChord=0.05
  sections:
    n  Span  Root_Chord  Tip_Chord  Area  Sweep  Sweep_Location  Dihedral  Twist  Twist_Location  tip airfoil
    1  1     1.5         0.5        1     45     0               0         0      0.25            NACA 4-series Camber=0 CamberLoc=0.2 ThickChord=0.02

Wing "WingGeom", child of "AMRAAM"
  location (X Y Z) 33.307 -2.67 -1.43292, rotation -165 0 0; relative location 5.7 0 0, rotation 0 0 0
  symmetric about XZ
  bounding box size 1 1.46185 0.436594
  totals: TotalSpan=1.5 TotalProjectedSpan=1.5 TotalChord=0.625 TotalArea=0.9375 TotalAR=2.4 MAC=0.7
  root: chord 1, twist 0, NACA 4-series Camber=0 CamberLoc=0.2 ThickChord=0.05
  sections:
    n  Span  Root_Chord  Tip_Chord  Area     Sweep  Sweep_Location  Dihedral  Twist  Twist_Location  tip airfoil
    1  0.75  1           0.25       0.46875  0      0.996429        0         0      0.25            NACA 4-series Camber=0 CamberLoc=0.2 ThickChord=0.02

Wing "WingGeom", child of "AMRAAM"
  location (X Y Z) 33.307 -2.67 -1.43292, rotation -75 0 0; relative location 5.7 0 0, rotation 90 0 0
  symmetric about XY
  bounding box size 1 0.436594 1.46185
  totals: TotalSpan=1.5 TotalProjectedSpan=1.5 TotalChord=0.625 TotalArea=0.9375 TotalAR=2.4 MAC=0.7
  root: chord 1, twist 0, NACA 4-series Camber=0 CamberLoc=0.2 ThickChord=0.05
  sections:
    n  Span  Root_Chord  Tip_Chord  Area     Sweep  Sweep_Location  Dihedral  Twist  Twist_Location  tip airfoil
    1  0.75  1           0.25       0.46875  0      0.996429        0         0      0.25            NACA 4-series Camber=0 CamberLoc=0.2 ThickChord=0.02

Wing "Horizontal Stabilizer"
  location (X Y Z) 35.25 1.77959 0, rotation 0 0 5
  symmetric about XZ
  bounding box size 15.4702 22.5775 0.773339
  totals: TotalSpan=16.5 TotalProjectedSpan=16.5 TotalChord=9.5 TotalArea=136.559 TotalAR=1.99364 MAC=9.45507
  root: chord 14.8073, twist 0, NACA 64-series A=1 IdealCl=0.2 ThickChord=0.04
  sections:
    n  Span     Root_Chord  Tip_Chord  Area     Sweep    Sweep_Location  Dihedral  Twist  Twist_Location  tip airfoil
    1  2.35714  14.8073     9.90319    29.1231  33.1673  0.532143        0         0      0.25            NACA 4-series Camber=0 CamberLoc=0.2 ThickChord=0.0642857
    2  5.89286  9.90319     3.38628    39.1565  38.0783  0               0         0      0.25            NACA 4-series Camber=0 CamberLoc=0.2 ThickChord=0.1
  SS_Control "SS_CONT_0": EtaStart=0.297561 EtaEnd=0.980392 Length_C_Start=0.294521 Length_C_End=0.294521 Length_Start=2.88486 Length_End=1.05002 LE_Flag=0 Surf_Type=2

Wing "Vertical Stabilizer"
  location (X Y Z) 36.5656 4.75 0, rotation 67 0 0
  symmetric about XZ
  bounding box size 8.42323 17.1031 7.86468
  totals: TotalSpan=15.752 TotalProjectedSpan=15.752 TotalChord=6.15266 TotalArea=81.1638 TotalAR=3.0571 MAC=5.64612
  root: chord 7.726, twist 0, NACA 4-series Camber=0 CamberLoc=0.2 ThickChord=0.203571
  sections:
    n  Span   Root_Chord  Tip_Chord  Area     Sweep    Sweep_Location  Dihedral  Twist  Twist_Location  tip airfoil
    1  1      7.726       7.26021    7.4931   32.3843  0               -360      0      0.25            NACA 4-series Camber=0 CamberLoc=0.2 ThickChord=0.1
    2  6.876  7.26021     2.36422    33.0888  28.4698  0.346429        0         0      0.25            NACA 64-series A=1 IdealCl=0 ThickChord=0.02
  SS_Control "SS_CONT_0": EtaStart=0.141463 EtaEnd=0.960784 Length_C_Start=0.25 Length_C_End=0.25 Length_Start=1.79473 Length_End=0.646036 LE_Flag=0 Surf_Type=2

Wing "Main Wing"
  location (X Y Z) 14.7824 0 0, rotation 0 0 0
  symmetric about XZ
  bounding box size 26.9731 40.2635 1.61946
  totals: TotalSpan=40.0014 TotalProjectedSpan=40.0014 TotalChord=15.8263 TotalArea=529.372 TotalAR=3.02266 MAC=16.4556
  root: chord 26.9731, twist 0, NACA 4-series Camber=0 CamberLoc=0.2 ThickChord=0.06
  sections:
    n  Span     Root_Chord  Tip_Chord  Area     Sweep  Sweep_Location  Dihedral  Twist  Twist_Location  tip airfoil
    1  5.66669  26.9731     16.6446    123.584  40     0.25            0         0      0.25            NACA 64-series A=1 IdealCl=0.2 ThickChord=0.05
    2  14.334   16.6446     3.0432     141.102  40     0.25            0         0      0.25            NACA 64-series A=1 IdealCl=0.2 ThickChord=0.104982
  SS_Control "Ailerons": UStart=0.64878 UEnd=0.740196 Length_C_Start=0.165517 Length_C_End=0.165517 Length_Start=1.41519 Length_End=0.591986 LE_Flag=0 Surf_Type=2
  SS_Control "Fowler Flaps": UStart=0.507317 UEnd=0.637255 Length_C_Start=0.165517 Length_C_End=0.165517 Length_Start=2.68907 Length_End=1.51898 LE_Flag=0 Surf_Type=2
